// COMSOL Multiphysics 5.1.0.234 model "physicalmodel.mph"
// Untitled\n\n
// Outline of the model tree

Probes
  pdom1: DomainPoint "Domain Point Probe 1"
    ppb1: PointExpr "Point Probe Expression 1" | expr = actd.p_t; table = tbl1
  pdom2: DomainPoint "Domain Point Probe 2"
    ppb2: PointExpr "Point Probe Expression 2" | expr = actd.p_t; table = tbl1
  pdom3: DomainPoint "Domain Point Probe 3"
    ppb3: PointExpr "Point Probe Expression 3" | expr = actd.p_t; table = tbl1
  pdom4: DomainPoint "Domain Point Probe 4"
    ppb4: PointExpr "Point Probe Expression 4" | expr = actd.p_t; table = tbl1
  pdom5: DomainPoint "Domain Point Probe 5"
    ppb5: PointExpr "Point Probe Expression 5" | expr = actd.p_t; table = tbl1
  pdom6: DomainPoint "Domain Point Probe 6"
    ppb6: PointExpr "Point Probe Expression 6" | expr = actd.p_t; table = tbl1
  pdom7: DomainPoint "Domain Point Probe 7"
    ppb7: PointExpr "Point Probe Expression 7" | expr = actd.p_t; table = tbl1
  pdom8: DomainPoint "Domain Point Probe 8"
    ppb8: PointExpr "Point Probe Expression 8" | expr = actd.p_t; table = tbl1
  pdom9: DomainPoint "Domain Point Probe 9"
    ppb9: PointExpr "Point Probe Expression 9" | expr = actd.p_t; table = tbl1
  pdom10: DomainPoint "Domain Point Probe 10"
    ppb10: PointExpr "Point Probe Expression 10" | expr = actd.p_t; table = tbl1
  pdom11: DomainPoint "Domain Point Probe 11"
    ppb11: PointExpr "Point Probe Expression 11" | expr = actd.p_t; table = tbl1
  pdom12: DomainPoint "Domain Point Probe 12"
    ppb12: PointExpr "Point Probe Expression 12" | expr = actd.p_t; table = tbl1

Geometry
  geom1 "Geometry 1" (3D, length unit m)
    blk1: Block | pos = {-0.5, -0.5, -0.5}; size = {1, 1, 1}
    cyl1: Cylinder | pos = {0, 0, -0.5}; r = 0.3; h = 1
    dif1: Difference | input = blk1; input2 = cyl1
    pt1: Point "Sourcepoint" | p = {-0.3, -0.3, -0.3}
    fin: Finalize "Form Union"

Materials
  mat2: Common "Concrete" on all domains
    def "Basic"
      thermalexpansioncoefficient = 10e-6[1/K]
      density = 2300[kg/m^3]
      thermalconductivity = 1.8[W/(m*K)]
      heatcapacity = 880[J/(kg*K)]
      soundspeed = 3200
    Enu "Young's modulus and Poisson's ratio"
      youngsmodulus = 25e9[Pa]
      poissonsratio = 0.33

Physics
  actd: TransientPressureAcoustics "Pressure Acoustics, Transient" on all domains
    dependent variable p
    tpam1: TransientPressureAcousticsModel (default)
    shb1: SoundHard "Sound Hard Boundary (Wall) 1" (default)
    init1: init "Initial Values 1" (default)
    mps1: TransientMonopolePointSource "Monopole Point Source 1" on points 5
      Type = GaussianPulse
      A = 10
      f0 = 25000
      tp = 0.0012[s]

Mesh
  mesh1 "Mesh 1"
    size: MeshSizeDefault | hauto = 13
    ftet1: FreeTet "Free Tetrahedral 1" on remaining entities

Studies
  std1 "Study 1"
    time: Transient "Time Dependent" | tlist = range(0,0.0001,0.002)

Solver configurations
  sol1 "Solution 1" (study std1)
    v1: Variables "Dependent Variables 1"
    t1: Time "Time-Dependent Solver 1"
      tlist = range(0,0.0001,0.002)
      rtol = 0.01
      atolglobalmethod = scaled
      atolglobal = 0.001
      timemethod = genalpha
      maxorder = 5
      minorder = 1
      rhoinf = 0.75
      dDef: Direct
      fc1: FullyCoupled | linsolver = dDef

Datasets
  dset1: Solution | solution = sol1
  dset2: Solution "Probe Solution 2" | solution = sol1
  cpt1: CutPoint3D "Domain Point Probe 1" | data = dset2; pointx = 0.5
  cpt2: CutPoint3D "Domain Point Probe 2" | data = dset2; pointx = -0.5
  cpt3: CutPoint3D "Domain Point Probe 3" | data = dset2; pointy = 0.5
  cpt4: CutPoint3D "Domain Point Probe 4" | data = dset2; pointy = -0.5
  cpt5: CutPoint3D "Domain Point Probe 5" | data = dset2; pointx = 0.5; pointy = 0.5; pointz = 0.5
  cpt6: CutPoint3D "Domain Point Probe 6" | data = dset2; pointx = 0.5; pointy = -0.5; pointz = 0.5
  cpt7: CutPoint3D "Domain Point Probe 7" | data = dset2; pointx = 0.5; pointy = 0.5; pointz = -0.5
  cpt8: CutPoint3D "Domain Point Probe 8" | data = dset2; pointx = 0.5; pointy = -0.5; pointz = -0.5
  cpt9: CutPoint3D "Domain Point Probe 9" | data = dset2; pointx = -0.5; pointy = 0.5; pointz = 0.5
  cpt10: CutPoint3D "Domain Point Probe 10" | data = dset2; pointx = -0.5; pointy = -0.5; pointz = 0.5
  cpt11: CutPoint3D "Domain Point Probe 11" | data = dset2; pointx = -0.5; pointy = 0.5; pointz = -0.5
  cpt12: CutPoint3D "Domain Point Probe 12" | data = dset2; pointx = -0.5; pointy = -0.5; pointz = -0.5

Derived values
  pev1: EvalPoint "Point Probe Expression 1" | data = cpt1; table = tbl1; expr = actd.p_t
  pev2: EvalPoint "Point Probe Expression 2" | data = cpt2; table = tbl1; expr = actd.p_t
  pev3: EvalPoint "Point Probe Expression 3" | data = cpt3; table = tbl1; expr = actd.p_t
  pev4: EvalPoint "Point Probe Expression 4" | data = cpt4; table = tbl1; expr = actd.p_t
  pev5: EvalPoint "Point Probe Expression 5" | data = cpt5; table = tbl1; expr = actd.p_t
  pev6: EvalPoint "Point Probe Expression 6" | data = cpt6; table = tbl1; expr = actd.p_t
  pev7: EvalPoint "Point Probe Expression 7" | data = cpt7; table = tbl1; expr = actd.p_t
  pev8: EvalPoint "Point Probe Expression 8" | data = cpt8; table = tbl1; expr = actd.p_t
  pev9: EvalPoint "Point Probe Expression 9" | data = cpt9; table = tbl1; expr = actd.p_t
  pev10: EvalPoint "Point Probe Expression 10" | data = cpt10; table = tbl1; expr = actd.p_t
  pev11: EvalPoint "Point Probe Expression 11" | data = cpt11; table = tbl1; expr = actd.p_t
  pev12: EvalPoint "Point Probe Expression 12" | data = cpt12; table = tbl1; expr = actd.p_t

Tables
  tbl1: Table "Probe Table 1"
    t | Total acoustic pressure field (Pa), Point Probe Expression 1 | Total acoustic pressure field (Pa), Point Probe Expression 2 | Total acoustic pressure field (Pa), Point Probe Expression 3 | Total acoustic pressure field (Pa), Point Probe Expression 4 | Total acoustic pressure field (Pa), Point Probe Expression 5 | Total acoustic pressure field (Pa), Point Probe Expression 6 | Total acoustic pressure field (Pa), Point Probe Expression 7 | Total acoustic pressure field (Pa), Point Probe Expression 8 | Total acoustic pressure field (Pa), Point Probe Expression 9 | Total acoustic pressure field (Pa), Point Probe Expression 10 | Total acoustic pressure field (Pa), Point Probe Expression 11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
    0 | 0 | 0 | 0 | 0 | 0 | 0 | 0 | 0 | 0 | 0 | 0
    2e-06 | 0 | 0 | 0 | 0 | 0 | 0 | 0 | 0 | 0 | 0 | 0
    6e-06 | 0 | 0 | 0 | 0 | 0 | 0 | 0 | 0 | 0 | 0 | 0
    1.4e-05 | 0 | 0 | 0 | 0 | 0 | 0 | 0 | 0 | 0 | 0 | 0
    3e-05 | 0 | 0 | 0 | 0 | 0 | 0 | 0 | 0 | 0 | 0 | 0
    6.2e-05 | 0 | 0 | 0 | 0 | 0 | 0 | 0 | 0 | 0 | 0 | 0
    0.000126 | 0 | 0 | 0 | 0 | 0 | 0 | 0 | 0 | 0 | 0 | 0
    0.000254 | 0 | 0 | 0 | 0 | 0 | 0 | 0 | 0 | 0 | 0 | 0
    0.000454 | 0 | 0 | 0 | 0 | 0 | 0 | 0 | 0 | 0 | 0 | 0
    0.000654 | 0 | 0 | 0 | 0 | 0 | 0 | 0 | 0 | 0 | 0 | 0
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
Plots
  pg1: PlotGroup3D "Acoustic Pressure (actd)" | data = dset1
    surf1: Surface | expr = actd.p_t
  pg2: PlotGroup3D "Acoustic Pressure, Isosurfaces (actd)" | data = dset1
    iso1: Isosurface | expr = actd.p_t
  pg3: PlotGroup1D "Probe Plot Group 3"
    tblp1: Table "Probe Table Graph 1" | table = tbl1